*Heading
** Job name: lower-vitreous-yangs Model name: assembly-improved
** Generated by: Abaqus/CAE 2025
*Preprint, echo=NO, model=NO, history=NO, contact=NO
**
** PARTS
**
*Part, name=back-sclera
*End Part
**
*Part, name=cornea
*End Part
**
*Part, name=crystalline
*End Part
**
*Part, name=front-sclera
*End Part
**
*Part, name=touch-len
*End Part
**
*Part, name=vitreous
*End Part
**
**
** ASSEMBLY
**
*Assembly, name=Assembly
**
*Instance, name=back-sclera-1, part=back-sclera
6.69970745548198e-11, 0.574192770153406,           0.
*Node
      1,   10.4872065,   -1.9078151
      2,   10.4707088,  -2.49583745
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*Element, type=CAX4R
 1,  1,  2, 31, 30
 2,  2,  3, 32, 31
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*Nset, nset=_PickedSet2, internal, generate
  1,  58,   1
*Elset, elset=_PickedSet2, internal, generate
  1,  28,   1
** Section: back-sclera
*Solid Section, elset=_PickedSet2, material=back-sclera
,
*End Instance
**
*Instance, name=cornea-1, part=cornea
*Node
      1,  0.481281996,   11.0214195
      2,           0.,   11.0214195
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*Element, type=CAX4R
 1,   1,   9, 156,  28
 2,   9,  10, 157, 156
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*Element, type=CAX3
37, 389, 225, 338
38,  79,   5,  80
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*Nset, nset=_PickedSet2, internal, generate
   1,  498,    1
*Elset, elset=_PickedSet2, internal, generate
   1,  437,    1
** Section: cornea
*Solid Section, elset=_PickedSet2, material=cornea
,
*End Instance
**
*Instance, name=crystalline-1, part=crystalline
6.69970745548198e-11, 17.3711169817534,           0.
*Node
      1,   3.07247043,  -10.8885136
      2,   2.48821044,  -10.6387339
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*Element, type=CAX3
1, 412, 106, 407
2, 285, 248, 247
3, 287, 355, 357
4, 386, 425, 381
*Element, type=CAX4R
  5, 112, 114, 123, 124
  6,  25,  92,  89,  24
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*Nset, nset=_PickedSet2, internal, generate
   1,  438,    1
*Elset, elset=_PickedSet2, internal, generate
   1,  403,    1
** Section: crystalline
*Solid Section, elset=_PickedSet2, material=crystalline
,
*End Instance
**
*Instance, name=front-sclera-1, part=front-sclera
-3.7668534957902e-11, 3.32161228045504,           0.
*Node
      1,    9.9515543,   1.12480748
      2,   9.14303398,  0.481538087
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*Element, type=CAX4R
 1,  1,  7, 38, 26
 2,  7,  2,  8, 38
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*Nset, nset=_PickedSet2, internal, generate
  1,  51,   1
*Elset, elset=_PickedSet2, internal, generate
  1,  32,   1
** Section: front-sclera
*Solid Section, elset=_PickedSet2, material=front-sclera
,
*End Instance
**
*Instance, name=vitreous-1, part=vitreous
6.69970745548198e-11, 3.36074095755341,           0.
*Node
      1,   5.18822765,  0.667528808
      2,    7.0936842, -0.708963871
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*Element, type=CAX3
1, 58, 61, 59
12, 164, 145, 143
13, 185, 218, 165
14, 214, 178, 157
15, 188, 177, 178
16, 204, 202, 193
*Element, type=CAX4R
 2, 14,  1,  7, 56
 3,  8, 57, 56,  7
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*Nset, nset=_PickedSet2, internal, generate
   1,  218,    1
*Elset, elset=_PickedSet2, internal, generate
   1,  195,    1
** Section: vitreous
*Solid Section, elset=_PickedSet2, material=vitreous
,
*End Instance
**
*Instance, name=touch-len-1, part=touch-len
          0.,      2.56402,           0.
*Node
      1,           6.,           8.
      2,   5.75207853,   8.18007278
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*Element, type=CAX4R
 1,  1,  2, 24, 23
 2,  2,  3, 25, 24
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*Nset, nset=_PickedSet2, internal, generate
  1,  88,   1
*Elset, elset=_PickedSet2, internal, generate
  1,  63,   1
** Section: touch-len
*Solid Section, elset=_PickedSet2, material=touch-len
,
*End Instance
**
*Node
      1,           0.,   12.0640202,           0.
*Nset, nset=_PickedSet31, internal, instance=back-sclera-1, generate
 30,  58,   1
*Nset, nset=_PickedSet31, internal, instance=front-sclera-1
  1,  4,  5, 18, 19, 20
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*Elset, elset=_PickedSet31, internal, instance=back-sclera-1, generate
  1,  28,   1
*Elset, elset=_PickedSet31, internal, instance=front-sclera-1
  1,  3,  5,  7,  9, 11, 13, 15, 17, 19, 22, 24, 26, 28, 30, 32
*Nset, nset=_PickedSet74, internal
 1,
*Nset, nset=_PickedSet75, internal
 1,
*Nset, nset=_PickedSet76, internal, instance=back-sclera-1
 29, 58
*Nset, nset=_PickedSet76, internal, instance=cornea-1
   2,   3,   7,  14,  15,  16,  17,  18, 140, 141, 142
*Nset, nset=_PickedSet76, internal, instance=crystalline-1
  6,  7, 29, 30, 31, 32
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*Nset, nset=_PickedSet76, internal, instance=vitreous-1
  5,  6, 21, 22, 23, 24, 25, 26, 27, 28, 29, 30, 31, 32
*Nset, nset=_PickedSet76, internal, instance=touch-len-1, generate
 22,  88,  22
*Elset, elset=_PickedSet76, internal, instance=back-sclera-1
 28,
*Elset, elset=_PickedSet76, internal, instance=cornea-1
   6,  12,  18,  24,  30,  36,  47, 229, 239, 250
*Elset, elset=_PickedSet76, internal, instance=crystalline-1
  10,  14,  27,  28,  36,  38
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*Elset, elset=_PickedSet76, internal, instance=vitreous-1
  27,  30,  32,  33,  36,  38,  40,  42,  43,  45,  46,  67, 123
*Elset, elset=_PickedSet76, internal, instance=touch-len-1, generate
 21,  63,  21
*Elset, elset=__PickedSurf23_S2, internal, instance=cornea-1
 408, 435
*Elset, elset=__PickedSurf23_S3, internal, instance=cornea-1
 413, 414, 423, 430
*Elset, elset=__PickedSurf23_S3, internal, instance=front-sclera-1
 31, 32
*Elset, elset=__PickedSurf23_S4, internal, instance=cornea-1
 422, 424
*Surface, type=ELEMENT, name=_PickedSurf23, internal
__PickedSurf23_S2, S2
__PickedSurf23_S3, S3
__PickedSurf23_S4, S4
*Elset, elset=__PickedSurf24_S2, internal, instance=cornea-1
 408, 435
*Elset, elset=__PickedSurf24_S3, internal, instance=cornea-1
 413, 414, 423, 430
*Elset, elset=__PickedSurf24_S4, internal, instance=cornea-1
 422, 424
*Surface, type=ELEMENT, name=_PickedSurf24, internal
__PickedSurf24_S2, S2
__PickedSurf24_S3, S3
__PickedSurf24_S4, S4
*Elset, elset=__PickedSurf25_S4, internal, instance=back-sclera-1
 1,
*Surface, type=ELEMENT, name=_PickedSurf25, internal
__PickedSurf25_S4, S4
*Elset, elset=__PickedSurf26_S3, internal, instance=front-sclera-1
 19, 20
*Surface, type=ELEMENT, name=_PickedSurf26, internal
__PickedSurf26_S3, S3
*Elset, elset=__PickedSurf73_S1, internal, instance=touch-len-1, generate
  1,  21,   1
*Elset, elset=__PickedSurf73_S2, internal, instance=touch-len-1, generate
 21,  63,  21
*Elset, elset=__PickedSurf73_S3, internal, instance=touch-len-1, generate
 43,  63,   1
*Elset, elset=__PickedSurf73_S4, internal, instance=touch-len-1, generate
  1,  43,  21
*Surface, type=ELEMENT, name=_PickedSurf73, internal
__PickedSurf73_S1, S1
__PickedSurf73_S2, S2
__PickedSurf73_S4, S4
__PickedSurf73_S3, S3
*Elset, elset=__PickedSurf109_S1, internal, instance=cornea-1
  38,  59,  74,  77, 139, 191, 197, 198, 200, 207, 208, 210, 211, 212, 395
*Elset, elset=__PickedSurf109_S1, internal, instance=crystalline-1
 62,
*Elset, elset=__PickedSurf109_S1, internal, instance=vitreous-1
 2, 8, 9
*Elset, elset=__PickedSurf109_S2, internal, instance=cornea-1
  40,  96, 106, 111, 112, 119, 136, 138, 143, 163, 203, 204, 206, 215, 264
*Elset, elset=__PickedSurf109_S2, internal, instance=crystalline-1
  17,  19,  20,  25,  28,  61,  64,  69,  70,  72,  76,  84,  86,  89,  92, 397
*Elset, elset=__PickedSurf109_S2, internal, instance=vitreous-1
 17,
*Elset, elset=__PickedSurf109_S4, internal, instance=cornea-1
  57,  58,  94,  95, 120, 121, 133, 134, 160, 182, 190, 201, 202, 205, 214
*Elset, elset=__PickedSurf109_S4, internal, instance=crystalline-1
  6, 11, 12, 15, 18, 26, 63, 65, 67, 74, 83, 88
*Elset, elset=__PickedSurf109_S4, internal, instance=front-sclera-1, generate
 21,  31,   2
*Elset, elset=__PickedSurf109_S3, internal, instance=cornea-1
  31,  32,  33,  34,  35,  36,  71,  73,  75, 122, 189, 209, 261
*Elset, elset=__PickedSurf109_S3, internal, instance=vitreous-1
 5, 7
*Surface, type=ELEMENT, name=_PickedSurf109, internal
__PickedSurf109_S1, S1
__PickedSurf109_S2, S2
__PickedSurf109_S4, S4
__PickedSurf109_S3, S3
** Constraint: cornea-front-sclera
*Tie, name=cornea-front-sclera, adjust=yes
_PickedSurf24, _PickedSurf23
** Constraint: front-back-sclera
*Tie, name=front-back-sclera, adjust=yes
_PickedSurf26, _PickedSurf25
** Constraint: touch-len
*Coupling, constraint name=touch-len, ref node=_PickedSet74, surface=_PickedSurf73
*Kinematic
*End Assembly
*Amplitude, name=len-press
             0.,              0.,            0.01,              1.
**
** MATERIALS
**
*Material, name=back-sclera
*Density
 1.4e-09,
*Elastic
 8.2, 0.49
*Material, name=cornea
*Density
 1.4e-09,
*Elastic
 0.25, 0.49
*Material, name=crystalline
*Density
 1e-09,
*Elastic
 0.16, 0.49
*Material, name=front-sclera
*Density
 1.4e-09,
*Elastic
 4.3, 0.49
*Material, name=touch-len
*Density
 1.2e-09,
*Elastic
 0.5, 0.49
*Material, name=vitreous
*Density
 1e-09,
*Elastic
 0.01, 0.49
**
** INTERACTION PROPERTIES
**
*Surface Interaction, name=global
*Friction
0.,
*Surface Behavior, pressure-overclosure=HARD
** ----------------------------------------------------------------
**
** STEP: Press
**
*Step, name=Press, nlgeom=YES
*Dynamic, Explicit
, 0.01
*Bulk Viscosity
0.06, 1.2
**
** BOUNDARY CONDITIONS
**
** Name: axis-fixed Type: 对称/反对称/完全固定
*Boundary
_PickedSet76, XSYMM
** Name: len-press Type: 位移/转角
*Boundary, amplitude=len-press
_PickedSet75, 1, 1
_PickedSet75, 2, 2, -0.5
_PickedSet75, 6, 6
** Name: sclera-fixed Type: 对称/反对称/完全固定
*Boundary
_PickedSet31, ENCASTRE
**
** LOADS
**
** Name: aqueous   Type: Pressure
*Dsload
_PickedSurf109, P, 0.0024
**
** INTERACTIONS
**
** Interaction: global
*Contact, op=NEW
*Contact Inclusions, ALL EXTERIOR
**
** OUTPUT REQUESTS
**
*Restart, write, number interval=1, time marks=NO
**
** FIELD OUTPUT: F-Output-1
**
*Output, field, number interval=15, time marks=YES
*Node Output
UT,
*Element Output, directions=YES
S,
**
** HISTORY OUTPUT: H-Output-1
**
*Output, history, variable=PRESELECT
*End Step
** ----------------------------------------------------------------
**
** STEP: Resume
**
*Step, name=Resume, nlgeom=YES
*Dynamic, Explicit
, 0.1
*Bulk Viscosity
0.06, 1.2
**
** OUTPUT REQUESTS
**
*Restart, write, number interval=1, time marks=NO
**
** FIELD OUTPUT: F-Output-1
**
*Output, field, number interval=15, time marks=YES
*Node Output
UT,
*Element Output, directions=YES
S,
**
** HISTORY OUTPUT: H-Output-1
**
*Output, history, variable=PRESELECT
*End Step
